folder simulations: version=36; creator=Apsim 7.8-r3867
  factorial Factorials: active=0
    settings
  simulation SimulationSugar
    metfile met
      filename=D:/Dropbox/Pesquisa/Projetos/futureSugar/data/weather/met/PIRA0QXX.met
    manager ClimateControl
      # Climate Control Window
      date1 = 1-jan  # Enter window START date (dd-mmm)
      date2 = 31-dec  # Enter window END date (dd-mmm)
      # Climate Change Parameters
      MaxtChange = 0  # Change in maximum temperature (oC)
      MintChange = 0  # Change in minimum temperature (oC)
      RainChange = 0  # Relative change in daily rainfall (%)
      RadnChange = 0  # Relative change in daily radiation (%)
      CO2 = 350  # Atmospheric CO2 Concentration (ppm)
      on prenewmet:
```
!  Adjust daily temperatures, rainfall and radiation up or down according to user-defined amounts
! To apply different levels of climate control to different times of year add multiple copies of this logic into your simulation and change the window.

if (date_within('[date1], [date2]') = 1) then
   maxt = maxt + [MaxtChange]
   mint = mint + [MintChange]
   rain = rain + rain * [RainChange] / 100
   radn = radn + radn * [RadnChange] / 100
   co2 = [CO2]
 endif
```
      on Init:
```
co2 = [CO2]
tav = tav + ([MaxtChange] + [MintChange]) / 2
```
    clock
      start_date = 01/01/1980  # Select the start date of the simulation
      end_date = 31/12/1981  # Select the end date of the simulation
    summaryfile
    area paddock
      Soil Clayey: SoilType=Clayey soil; YearOfSampling=0; DataSource=Marin 2011; Comments=Dataset 2
        InitialWater: FractionFull=1; PercentMethod=EvenlyDistributed; RelativeTo=ll15
        Water
          Thickness  BD    AirDry  LL15   DUL    SAT    KS
          200        1.34  0.11    0.22   0.36   0.52   0.39
          200        1.29  0.188   0.235  0.355  0.495  0.385
          600        1.25  0.24    0.24   0.343  0.473  0.373
          1000       1.22  0.25    0.25   0.335  0.47   0.37
          1000       1.22  0.25    0.25   0.335  0.47   0.37
          1000       1.22  0.25    0.25   0.335  0.47   0.37
          500        1.22  0.25    0.25   0.335  0.47   0.37
          SoilCrop sugar: LL=[0.22, 0.235, 0.24, 0.25, 0.25, 0.25, 0.25]; KL=[0.15, 0.15, 0.1, 0.08, 0.08, 0.08, 0.08]; XF=[1, 1, 1, 1, 1, 1, 1]
        SoilWater: SummerCona=3.5; SummerU=6; SummerDate=1-Nov; WinterCona=2.5; WinterU=4; WinterDate=1-Apr; DiffusConst=40; DiffusSlope=16; Salb=0.17; CN2Bare=84; CNRed=20; CNCov=0.8; Slope=3; Thickness=[200, 200, 600, 1000, 1000, 1000, 500]; SWCON=[0.3, 0.3, 0.3, 0.3, 0.3, 0.3, 0.3]
        SoilOrganicMatter: RootCN=50; RootWt=500; SoilCN=20; EnrACoeff=7.4; EnrBCoeff=0.2; OCUnits=Total
          Thickness  OC    FBiom  FInert
          200        1.7   0.05   0.4
          200        0.81  0.035  0.5
          600        0.05  0.02   0.7
          1000       0.05  0.01   0.95
          1000       0.05  0.01   0.95
          1000       0.05  0.01   0.95
          500        0.05  0.01   0.95
        Analysis: PHUnits=Water; BoronUnits=HotWater
          Thickness  PH  CEC  ParticleSizeSilt  ParticleSizeClay
          200        7   5    8.5               50
          200        7   3.2  9                 54
          600        7   2.7  8                 57
          1000       7   2.7  8                 57
          1000       7   2.7  8                 57
          1000       7   2.7  8                 57
          500        7   2.7  8                 57
        Sample Initial nitrogen: NO3Units=ppm; NH4Units=ppm; SWUnits=Volumetric; OCUnits=Total; PHUnits=Water
          Thickness  NO3  NH4  SW
          200        1.6  0.2  0.36
          200        1.6  0.2  0.355
          600        1.6  0.2  0.343
          1000       1.6  0.2  0.335
          1000       1.6  0.2  0.335
          1000       1.6  0.2  0.335
          500        1.6  0.2  0.335
      surfaceom SurfaceOrganicMatter
        PoolName = palha  # Organic Matter pool name
        type = sugar  # Organic Matter type
        mass = 0  # Initial surface residue (kg/ha)
        cnr = 80.0  # C:N ratio of initial residue
        standing_fraction = 0.0  # Fraction of residue standing
      sugar
        ini
          filename=D:/Dropbox/Pesquisa/Projetos/futureSugar/data/cultivar/Sugar.xml
      irrigation
        automatic_irrigation = off
        asw_depth = 1000  # Depth to which ASW is calculated. (mm)
        crit_fr_asw = 0.4  # Fraction of ASW below which irrigation is applied (0-1.0)
        irrigation_efficiency = 1  # Efficiency of the irrigation. (0-1.0)
        irrigation_allocation = off  # Allocation limits
        allocation = 0  # Allocation in mm
        default_no3_conc = 0.0  # Nitrate concentration (ppm N)
        default_nh4_conc = 0.0  # Ammonium concentration (ppm N)
        default_cl_conc = 0.0  # Chloride concentration (ppm Cl)
      folder Manager folder
        manager sugar_management
          # Sugar1 plant crop management parameters
          crop = sugar  # Enter name of crop to sow
          planting_day = 15-may  # Enter planting date (dd-mmm)
          plantlen = 365  # Duration of a plant crop (days) (30 days/month * 15 months)
          plant_stalks = 10  # Stalk density of plant crop (/m2)
          variety = rb72454  # Planting variety
          sowing_depth = 150  # Planting depth mm)
          # Ratoon management parameters
          NoRatoons = 0  # Number of ratoons (max = 5)
          ratoonlen = 365  # Duration of a ratoon crop (days) (30 days/month * 13 months)
          ratoon_stalks = 10  # Stalk density of ratoon crop (/m2)
          # Dryoff config
          irrigstart = 30  # How many das should irrigation be applied
          dryoff = 98  # Number of days before harvest to stop irrigating
          irrigatemodule = Irrigation  # Module used to apply the irrigation
          on init:
```
            nextcrop = 0
            fallowin = 0
            ratoonlen = 0
            plantlen = 0
```
          on start_of_day:
```
            ! -----------------------------------------------------------------
            ! Book keeping to round days to integer values
            plantlen = nearest_int(plantlen)
            ratoonlen = nearest_int(ratoonlen)

            ! Initialise and set a time counter for entire run
            dah = 0

            if (sugar.crop_status = 'alive') then
               dah = 0

               ! Limited irrigation before harvesting and irrigation only happens while crop is alive

               stopIrr = [plantlen] - [dryoff]

               if (daysaftersowing < [irrigstart]) then
                  irrigation set automatic_irrigation = off
               elseif (daysaftersowing > stopIrr) then
                  irrigation set automatic_irrigation = off
               else 
                  irrigation set automatic_irrigation = on
               endif

               ! Set harvest dates for each crop phase
               if (sugar.DaysAfterSowing = [plantlen] and ratoon_no = 0) or
                  (sugar.DaysAfterSowing = [ratoonlen] and ratoon_no > 0) then

                  sugar harvest

                  if (ratoon_no = [NoRatoons] + 1) then
                     ! plough the crop out
                     sugar kill_crop
                     sugar end_crop

                  else
                     ! Set stalk density
                     sugar.plants = [ratoon_stalks]
                  endif
               else
                  ! We have not reached the harvest date for this ratoon.
               endif

            elseif (sugar.crop_status = 'dead') then
               sugar harvest
               sugar end_crop

            elseif (sugar.crop_status = 'out') and (today = date('[planting_day]') then
               sugar sow plants = 10 (), cultivar = [variety], sowing_depth = [sowing_depth]
               sugar.plants = [plant_stalks]
               dah = 0

            else
               dah = dah + 1
            endif
```
      outputfile: filename=SimulationSugar.out; title=SimulationSugar
        variables
          variables: day_of_year, simulation_days, daysaftersowing, year, biomass, canefw, cane_wt, sucrose_wt, ccs, scmst, scmstf, cabbage_wt, green_biomass, esw, lai, nfact_photo, root_depth, stagename, CO2, day_length, MaxT, MinT, Radn, Rain, es, eo, biomass, cane_dmf, cover_green, cover_tot, dlt_dm, dlt_dm_green, dm_dead, ep, height, lai_sum, lai2, leaf_wt2, leafgreenwt, plants, radn_int, rootgreenwt, senescedn, senescedwt, sstem_wt, slai, stage_code, sw_demand, sw_demand_te, swdef_expan, swdef_pheno, swdef_photo, swdef_stalk, tla, tlai, irrigation
        events Reporting Frequency: event=end_day
